!**************************************************
! BOUNDARY CONDITIONS
!**************************************************
!
/SOLU
DK,1,,,,0,ALL                                       ! Fix in first point
DK,n_points,,,,0,ALL                                ! Fix in last point
!
/PBC,ALL,,1                                         ! Plot to show applied boundary conditions
LPLOT
/ESHAPE,1.0                                         ! Turn on display of element
!
!**************************************************
! SOLVE
!**************************************************
!
! ANALYSIS TO SOLVE (analysis_to_solve)
! 1 - pressure
! 2 - temperature
! 3 - modal
!
analysis_to_solve=2
*IF,analysis_to_solve,EQ,1,THEN
    !**************************************************
    ! PRESSURE SOLVE
    !**************************************************
    !
    ESEL,ALL                                             ! Select all elements
    SFE,ALL,1,PRES,,internal_pressure                    ! Internal pressure
    SFE,ALL,2,PRES,,external_pressure                    ! External pressure
    !
    SOLVE
    FINISH
    !
*ELSEIF,analysis_to_solve,EQ,2,THEN
    !**************************************************
    ! TEMPERATURE SOLVE
    !**************************************************
    !
    ESEL,ALL
    BFE,ALL,TEMP,1,external_temperature,internal_temperature,,
    !
    SOLVE
    FINISH
    !
*ELSEIF,analysis_to_solve,EQ,3,THEN
    !**************************************************
    ! MODAL SOLVE
    !**************************************************
    antype,modal                                        ! To perform modal analysis
    modopt,lanb,modes                                   ! Mode-extraction method, used Block Lanczos with # modes to extract
    lumpm,on                                            ! Lumped Mass Approximation
    mxpand,modes,,,yes
    !
    SOLVE                                               ! Solve model
    FINISH
    !
*ENDIF
